/TITLE, CONTINUUM GROUND STRUCTURE
! File: comp2
! Course: MEK 41525
! Element type: PLANE42
! No. of Nodes:     1019
! No. of Elements:      786
/PREP7
! Define element type: ET, type #, name
ET,1,PLANE42
! Define material property: MP, property, card #, value
MP,EX,1,  1.00000000
MP,PRXY,1, 0.300000000
! Define nodal coordinate: N, node #, x-coord, y-coord, z-coord
N,       1,  1.95471519    , 0.175431310E-01, 0.
N,       2,  1.96416714    ,  0.00000000    , 0.
N,       3,  1.94712852    ,  0.00000000    , 0.
N,       4,  1.94526325    , 0.350862621E-01, 0.
N,       5,  1.94074714    , 0.149894416E-01, 0.
N,       6,  1.93173124    , 0.313616907E-01, 0.
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N,    1019, 0.306019383    ,  0.00000000    , 0.
! Define element connectivity: EN, element #, nodal list
MAT,     1
EN,       1,     222,     217,     216,     223
EN,       2,     216,     220,     221,     223
EN,       3,     615,     616,     593,     596
EN,       4,     596,     621,     622,     615
EN,       5,     621,     596,     598,     623
EN,       6,     593,     577,     598,     596
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EN,     786,     618,     639,     638,     614
! Define boundary support conditions: D, node #, dof label, value
D,      26,UX,  0.00000000
D,      26,UY,  0.00000000
D,       2,UX,  0.00000000
D,       2,UY,  0.00000000
D,      19,UX,  0.00000000
D,      19,UY,  0.00000000
D,      13,UX,  0.00000000
D,      13,UY,  0.00000000
D,       7,UX,  0.00000000
D,       7,UY,  0.00000000
D,       3,UX,  0.00000000
D,       3,UY,  0.00000000
D,    1019,UX,  0.00000000
D,    1019,UY,  0.00000000
D,    1015,UX,  0.00000000
D,    1015,UY,  0.00000000
D,    1018,UX,  0.00000000
D,    1018,UY,  0.00000000
D,    1017,UX,  0.00000000
D,    1017,UY,  0.00000000
D,    1016,UX,  0.00000000
D,    1016,UY,  0.00000000
! Define nodal load conditions: F, node #, dof label, value
F,     645,FY, -0.100000000E-01
! Define surface load conditions: SFE, element #, face #,PRES, value
FINISH
